# OpenSim document version 30000
Model RemiG:
  length_units: meters
  force_units: N
  gravity: 0 -9.80665 0
  credits:
    Delp S.L., Loan J.P., Hoy M.G., Zajac F.E., Topp E.L., Rosen J.M., Thelen D.G., Anderson F.C., Seth A., Hamner S.R.
  publications:
    Whole body model that consists of 23 bodies, 42 degrees of freedom and 30 muscles. The whole-body geometric model and the lower limbs, pelvis and upper limbs anthropometry are based on the running model of Hammer et al. 2010 which consists of 12 segments and 29 degrees of freedom. Extra segments and degrees of freedom were later added based on Dumas et al. 2007. Muscles …Each lower extremity had seven degrees-of-freedom; the hip was modeled as a ball-and-socket joint (3 dofs), the knee was modeled as a revolute joint with 1 dof, the ankle was modeled as 2 revolute joints and feet toes with one revolute joint. The pelvis joint was model as a free flyer joint (6 dofs) to allow the model to translate and rotate in the 3D space, the lumbar motion was modeled as a ball-and-socket joint (3 dofs) (Anderson and Pandy, 1999) and the neck joint was modeled as a ball-and-socket joint (3 dofs). Mass properties of the torso and head (including the neck) segments were estimated from Dumas et al., 2007. Each arm consisted of 8 degrees-of-freedom; the shoulder was modeled as a ball-and-socket joint (3 dofs), the elbow and forearm rotation were each modeled with revolute joints (1 dof) (Holzbaur et al., 2005), the wrist flexion and deviation were each modeled with revolute joints and the hand fingers were modeled with 1 revolute joint. Mass properties for the arms were estimated from 1 and de Leva, 1996. The model also include 30 superficial muscles of the whole body..
  BodySet:
    Body ground: mass=0 mass_center=(0 0 0) inertia_xx=0 inertia_yy=0 inertia_zz=0
    Body pelvis: mass=11.53934 mass_center=(-0.0731019 0 0) inertia_xx=0.1076855 inertia_yy=0.09123938
        inertia_zz=0.06065166 meshes=(sacrum.vtp pelvis.vtp l_pelvis.vtp)
      CustomJoint ground_pelvis: parent_body=ground location_in_parent=(0 0 0) location=(0 0 0)
        Coordinate pelvis_tilt: motion_type=rotational default_value=0 range=(-3.1416 3.1416) clamped=true
        Coordinate pelvis_list: motion_type=rotational default_value=0 range=(-3.1416 3.1416) clamped=true
        Coordinate pelvis_rotation: motion_type=rotational default_value=0 range=(-3.1416 3.1416) clamped=true
        Coordinate pelvis_tx: motion_type=translational default_value=0 range=(-10 10) clamped=true
        Coordinate pelvis_ty: motion_type=translational default_value=0 range=(-6 6) clamped=true
        Coordinate pelvis_tz: motion_type=translational default_value=0 range=(-5 5) clamped=true
        SpatialTransform:
          TransformAxis rotation1: coordinates=pelvis_tilt axis=(0 0 1) LinearFunction(coefficients=1 0)
          TransformAxis rotation2: coordinates=pelvis_list axis=(1 0 0) LinearFunction(coefficients=1 0)
          TransformAxis rotation3: coordinates=pelvis_rotation axis=(0 1 0) LinearFunction(coefficients=1 0)
          TransformAxis translation1: coordinates=pelvis_tx axis=(1 0 0) LinearFunction(coefficients=1 0)
          TransformAxis translation2: coordinates=pelvis_ty axis=(0 1 0) LinearFunction(coefficients=1 0)
          TransformAxis translation3: coordinates=pelvis_tz axis=(0 0 1) LinearFunction(coefficients=1 0)
    Body femur_r: mass=9.675902 mass_center=(0 -0.179318 0) inertia_xx=0.1549791 inertia_yy=0.04062558
        inertia_zz=0.1634283 meshes=femur_r.vtp
      CustomJoint hip_r: parent_body=pelvis location_in_parent=(-0.07310186 -0.06834559 0.08633671) location=(0 0 0)
        Coordinate hip_flexion_r: motion_type=rotational default_value=0 range=(-2.618 2.094395) clamped=true
        Coordinate hip_adduction_r: motion_type=rotational default_value=0 range=(-2.094395 2.094395) clamped=true
        Coordinate hip_rotation_r: motion_type=rotational default_value=0 range=(-2.094395 2.094395) clamped=true
        SpatialTransform: axes_held_at_zero=(translation1 translation2 translation3)
          TransformAxis rotation1: coordinates=hip_flexion_r axis=(0 0 1) LinearFunction(coefficients=1 0)
          TransformAxis rotation2: coordinates=hip_adduction_r axis=(1 0 0) LinearFunction(coefficients=1 0)
          TransformAxis rotation3: coordinates=hip_rotation_r axis=(0 1 0) LinearFunction(coefficients=1 0)
    Body tibia_r: mass=3.151403 mass_center=(0 -0.184111 0) inertia_xx=0.04166031 inertia_yy=0.004215627
        inertia_zz=0.04223893 meshes=(tibia_r.vtp fibula_r.vtp)
      CustomJoint knee_r: parent_body=femur_r location_in_parent=(0 -0.4113763 0) location=(0 0 0)
        Coordinate knee_angle_r: motion_type=rotational default_value=0 range=(-3.1416 0.3491) clamped=true
        SpatialTransform: axes_held_at_zero=(rotation2 rotation3 translation3)
          TransformAxis rotation1: coordinates=knee_angle_r axis=(0 0 1) LinearFunction(coefficients=1 0)
          TransformAxis translation1: coordinates=knee_angle_r axis=(1 0 0)
              MultiplierFunction(scale=1.054811, Constant(value=0))
          TransformAxis translation2: coordinates=knee_angle_r axis=(0 1 0)
              MultiplierFunction(scale=1.054811, Constant(value=0))
    Body talus_r: mass=0.08291815 mass_center=(0 0 0) inertia_xx=0.0007931159 inertia_yy=0.0007931159
        inertia_zz=0.0007931159 meshes=talus_rv.vtp
      CustomJoint ankle_r: parent_body=tibia_r location_in_parent=(0 -0.4240363 0) location=(0 0 0)
        Coordinate ankle_angle_r: motion_type=rotational default_value=0 range=(-1.570796 1.570796) clamped=true
        SpatialTransform: axes_held_at_zero=(rotation2 rotation3 translation1 translation2 translation3)
          TransformAxis rotation1: coordinates=ankle_angle_r axis=(-0.1050135 -0.1740224 0.9791263)
              LinearFunction(coefficients=1 0)
    Body calcn_r: mass=1.246186 mass_center=(0.103996 0.0311989 0) inertia_xx=0.001509513 inertia_yy=0.004205072
        inertia_zz=0.004420717 meshes=foot.vtp
      CustomJoint subtalar_r: parent_body=talus_r location_in_parent=(-0.04769757 -0.04102754 0.007745843)
          location=(0 0 0)
        Coordinate subtalar_angle_r: motion_type=rotational default_value=0 range=(-1.570796 1.570796) clamped=true
        SpatialTransform: axes_held_at_zero=(rotation2 rotation3 translation1 translation2 translation3)
          TransformAxis rotation1: coordinates=subtalar_angle_r axis=(0.7871796 0.6047475 -0.1209495)
              LinearFunction(coefficients=1 0)
    Body toes_r: mass=0.2119912 mass_center=(0.0357621 0.00620152 -0.0180878) inertia_xx=0.000104557
        inertia_yy=0.000209114 inertia_zz=0.00104557 meshes=bofoot.vtp
      CustomJoint mtp_r: parent_body=calcn_r location_in_parent=(0.1859454 -0.002079926 0.00112316) location=(0 0 0)
        Coordinate mtp_angle_r: motion_type=rotational default_value=0 range=(-1.570796 1.570796) clamped=true
        SpatialTransform: axes_held_at_zero=(rotation2 rotation3 translation1 translation2 translation3)
          TransformAxis rotation1: coordinates=mtp_angle_r axis=(-0.5809544 0 0.8139361)
              LinearFunction(coefficients=1 0)
    Body femur_l: mass=9.353793 mass_center=(0 -0.177306 0) inertia_xx=0.1464761 inertia_yy=0.03839666
        inertia_zz=0.1544618 meshes=femur_l.vtp
      CustomJoint hip_l: parent_body=pelvis location_in_parent=(-0.07310186 -0.06834559 -0.08633671) location=(0 0 0)
        Coordinate hip_flexion_l: motion_type=rotational default_value=0 range=(-2.618 2.094395) clamped=true
        Coordinate hip_adduction_l: motion_type=rotational default_value=0 range=(-2.094395 2.094395) clamped=true
        Coordinate hip_rotation_l: motion_type=rotational default_value=0 range=(-2.094395 2.094395) clamped=true
        SpatialTransform: axes_held_at_zero=(translation1 translation2 translation3)
          TransformAxis rotation1: coordinates=hip_flexion_l axis=(0 0 1) LinearFunction(coefficients=1 0)
          TransformAxis rotation2: coordinates=hip_adduction_l axis=(-1 0 0) LinearFunction(coefficients=1 0)
          TransformAxis rotation3: coordinates=hip_rotation_l axis=(0 -1 0) LinearFunction(coefficients=1 0)
    Body tibia_l: mass=3.093977 mass_center=(0 -0.182985 0) inertia_xx=0.04040275 inertia_yy=0.004088373
        inertia_zz=0.0409639 meshes=(tibia_l.vtp fibula_l.vtp)
      CustomJoint knee_l: parent_body=femur_l location_in_parent=(0 -0.4067598 0) location=(0 0 0)
        Coordinate knee_angle_l: motion_type=rotational default_value=0 range=(-3.1416 0.3491) clamped=true
        SpatialTransform: axes_held_at_zero=(rotation2 rotation3 translation3)
          TransformAxis rotation1: coordinates=knee_angle_l axis=(0 0 1) LinearFunction(coefficients=1 0)
          TransformAxis translation1: coordinates=knee_angle_l axis=(1 0 0)
              MultiplierFunction(scale=1.042974, Constant(value=0))
          TransformAxis translation2: coordinates=knee_angle_l axis=(0 1 0)
              MultiplierFunction(scale=1.042974, Constant(value=0))
    Body talus_l: mass=0.09024287 mass_center=(0 0 0) inertia_xx=0.0009132902 inertia_yy=0.0009132902
        inertia_zz=0.0009132902 meshes=talus_lv.vtp
      CustomJoint ankle_l: parent_body=tibia_l location_in_parent=(0 -0.4214448 0) location=(0 0 0)
        Coordinate ankle_angle_l: motion_type=rotational default_value=0 range=(-1.047198 1.047198) clamped=true
        SpatialTransform: axes_held_at_zero=(rotation2 rotation3 translation1 translation2 translation3)
          TransformAxis rotation1: coordinates=ankle_angle_l axis=(0.1050135 0.1740224 0.9791263)
              LinearFunction(coefficients=1 0)
    Body calcn_l: mass=1.238494 mass_center=(0.103782 0.0311346 0) inertia_xx=0.001494016 inertia_yy=0.004161903
        inertia_zz=0.004375333 meshes=l_foot.vtp
      CustomJoint subtalar_l: parent_body=talus_l location_in_parent=(-0.04906262 -0.0422017 -0.007967519)
          location=(0 0 0)
        Coordinate subtalar_angle_l: motion_type=rotational default_value=0 range=(-1.570796 1.570796) clamped=true
        SpatialTransform: axes_held_at_zero=(rotation2 rotation3 translation1 translation2 translation3)
          TransformAxis rotation1: coordinates=subtalar_angle_l axis=(-0.7871796 -0.6047475 -0.1209495)
              LinearFunction(coefficients=1 0)
    Body toes_l: mass=0.1886595 mass_center=(0.0343988 0.00596511 0.0173982) inertia_xx=8.60903e-5
        inertia_yy=0.0001721806 inertia_zz=0.000860903 meshes=l_bofoot.vtp
      CustomJoint mtp_l: parent_body=calcn_l location_in_parent=(0.185562 -0.002075638 -0.001120845) location=(0 0 0)
        Coordinate mtp_angle_l: motion_type=rotational default_value=0 range=(-1.047198 1.047198) clamped=true
        SpatialTransform: axes_held_at_zero=(rotation2 rotation3 translation1 translation2 translation3)
          TransformAxis rotation1: coordinates=mtp_angle_l axis=(0.5809544 0 0.8139361)
              LinearFunction(coefficients=1 0)
    Body torso: mass=21.01117 mass_center=(0.00310986 0.255009 0) inertia_xx=0.6657813 inertia_yy=0.6657813
        inertia_zz=0.8971712 meshes=(hat_spine.vtp hat_ribs_scap.vtp)
      CustomJoint back: parent_body=pelvis location_in_parent=(-0.104121 0.08426876 0) location=(0 0 0)
        Coordinate lumbar_extension: motion_type=rotational default_value=0 range=(-1.570796 1.570796) clamped=true
        Coordinate lumbar_bending: motion_type=rotational default_value=0 range=(-1.570796 1.570796) clamped=true
        Coordinate lumbar_rotation: motion_type=rotational default_value=0 range=(-1.570796 1.570796) clamped=true
        SpatialTransform: axes_held_at_zero=(translation1 translation2 translation3)
          TransformAxis rotation1: coordinates=lumbar_extension axis=(0 0 1) LinearFunction(coefficients=1 0)
          TransformAxis rotation2: coordinates=lumbar_bending axis=(1 0 0) LinearFunction(coefficients=1 0)
          TransformAxis rotation3: coordinates=lumbar_rotation axis=(0 1 0) LinearFunction(coefficients=1 0)
    Body head_and_neck: mass=3.571111 mass_center=(-0.00570368 0.141641 0) inertia_xx=0.01846349 inertia_yy=0.012008
        inertia_zz=0.0185323 inertia_xy=0.0001556234 inertia_xz=0.0001729148 inertia_yz=7.68515e-5
        meshes=(hat_jaw.vtp hat_skull.vtp)
      CustomJoint neck: parent_body=torso location_in_parent=(-0.01036621 0.4612962 0) location=(0 0 0)
        Coordinate neck_flexion: motion_type=rotational default_value=0 range=(-1.74533 1.047198) clamped=true
        Coordinate neck_lateral_bending: motion_type=rotational default_value=0 range=(-0.6 0.6) clamped=true
        Coordinate neck_rotation: motion_type=rotational default_value=0 range=(-1.2217 1.2217) clamped=true
        SpatialTransform: axes_held_at_zero=(translation1 translation2 translation3)
          TransformAxis rotation1: coordinates=neck_flexion axis=(0 0 1) LinearFunction(coefficients=1 0)
          TransformAxis rotation2: coordinates=neck_lateral_bending axis=(1 0 0) LinearFunction(coefficients=1 0)
          TransformAxis rotation3: coordinates=neck_rotation axis=(0 1 0) LinearFunction(coefficients=1 0)
    Body humerus_r: mass=1.747929 mass_center=(0 -0.162853 0) inertia_xx=0.01006851 inertia_yy=0.003473324
        inertia_zz=0.01130158 meshes=humerus_rv.vtp
      CustomJoint acromial_r: parent_body=torso location_in_parent=(0.003270538 0.3851046 0.1762255) location=(0 0 0)
        Coordinate arm_flex_r: motion_type=rotational default_value=0 range=(-1.570796 3.1416) clamped=false
        Coordinate arm_add_r: motion_type=rotational default_value=0 range=(-3.8397 1.570796) clamped=false
        Coordinate arm_rot_r: motion_type=rotational default_value=0 range=(-1.570796 1.570796) clamped=false
        SpatialTransform: axes_held_at_zero=(translation1 translation2 translation3)
          TransformAxis rotation1: coordinates=arm_flex_r axis=(0 0 1) LinearFunction(coefficients=1 0)
          TransformAxis rotation2: coordinates=arm_add_r axis=(1 0 0) LinearFunction(coefficients=1 0)
          TransformAxis rotation3: coordinates=arm_rot_r axis=(0 1 0) LinearFunction(coefficients=1 0)
    Body ulna_r: mass=0.6687078 mass_center=(0 -0.129549 0) inertia_xx=0.003766944 inertia_yy=0.0007859457
        inertia_zz=0.004086155 meshes=ulna_rv.vtp
      CustomJoint elbow_r: parent_body=humerus_r location_in_parent=(0.01301225 -0.2834034 -0.009498821)
          location=(0 0 0)
        Coordinate elbow_flex_r: motion_type=rotational default_value=0 range=(0 3.1416) clamped=true
        SpatialTransform: axes_held_at_zero=(rotation2 rotation3 translation1 translation2 translation3)
          TransformAxis rotation1: coordinates=elbow_flex_r axis=(0.226047 0.022269 0.9738618)
              LinearFunction(coefficients=1 0)
    Body radius_r: mass=0.6687078 mass_center=(0 -0.129549 0) inertia_xx=0.003766944 inertia_yy=0.0007859457
        inertia_zz=0.004086155 meshes=radius_rv.vtp
      CustomJoint radioulnar_r: parent_body=ulna_r location_in_parent=(-0.007230668 -0.01398087 0.0280359)
          location=(0 0 0)
        Coordinate pro_sup_r: motion_type=rotational default_value=-7.34641e-6 range=(-3.1416 3.1416) clamped=false
        SpatialTransform: axes_held_at_zero=(rotation2 rotation3 translation1 translation2 translation3)
          TransformAxis rotation1: coordinates=pro_sup_r axis=(0.05639803 0.9984065 0.001952)
              LinearFunction(coefficients=1 0)
    Body lunate_r: mass=0.008863783 mass_center=(0 0 0) inertia_xx=8.863783e-6 inertia_yy=8.863783e-6
        inertia_zz=8.863783e-6 meshes=lunate_rvs.vtp
      CustomJoint radius_lunate_r: parent_body=radius_r location_in_parent=(-0.009455654 -0.253499 0.01462902)
          orientation_in_parent=(0.1 0 0) location=(0 0 0)
        Coordinate wrist_flex_r: motion_type=rotational default_value=0 range=(-1.5708 1.5708) clamped=true
        SpatialTransform: axes_held_at_zero=(rotation2 rotation3 translation1 translation2 translation3)
          TransformAxis rotation1: coordinates=wrist_flex_r axis=(0 0 1) LinearFunction(coefficients=1 0)
    Body hand_r: mass=0.8327882 mass_center=(0 -0.0865546 0) inertia_xx=0.00262336 inertia_yy=0.00160872
        inertia_zz=0.003940922
        meshes=(pisiform_rvs.vtp scaphoid_rvs.vtp triquetrum_rvs.vtp hamate_rvs.vtp capitate_rvs.vtp trapezoid_rvs.vtp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)
      CustomJoint lunate_hand_r: parent_body=lunate_r location_in_parent=(0 0 0) location=(0 0 0)
        Coordinate wrist_dev_r: motion_type=rotational default_value=0 range=(-0.4363323 0.6108652) clamped=true
        SpatialTransform: axes_held_at_zero=(rotation1 rotation3 translation1 translation2 translation3)
          TransformAxis rotation2: coordinates=wrist_dev_r axis=(1 0 0) LinearFunction(coefficients=1 0)
    Body fingers_r: mass=0.1628994 mass_center=(0 -0.0834095 0) inertia_xx=0.002444103 inertia_yy=0.002444103
        inertia_zz=0.002444103
        meshes=(index_proximal_rvs.vtp index_medial_rvs.vtp index_distal_rvs.vtp middle_proximal_rvs.vtp middle_medial_rvs.vtp middle_distal_rvs.vtp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)
      CustomJoint fingers_r: parent_body=hand_r location_in_parent=(0 -0.09787359 -0.01271086) location=(0 0 0)
        Coordinate hand_finger_flex_r: motion_type=rotational default_value=0 range=(-1.5708 1.5708) clamped=true
        SpatialTransform: axes_held_at_zero=(rotation2 rotation3 translation1 translation2 translation3)
          TransformAxis rotation1: coordinates=hand_finger_flex_r axis=(0 0 1) LinearFunction(coefficients=1 0)
    Body humerus_l: mass=1.425417 mass_center=(0 -0.152149 0) inertia_xx=0.00716686 inertia_yy=0.002472345
        inertia_zz=0.00804457 meshes=humerus_lv.vtp
      CustomJoint acromial_l: parent_body=torso location_in_parent=(0.003270538 0.3851046 -0.1762255) location=(0 0 0)
        Coordinate arm_flex_l: motion_type=rotational default_value=0 range=(-1.570796 3.1416) clamped=false
        Coordinate arm_add_l: motion_type=rotational default_value=0 range=(-3.8397 1.570796) clamped=false
        Coordinate arm_rot_l: motion_type=rotational default_value=0 range=(-1.570796 1.570796) clamped=false
        SpatialTransform: axes_held_at_zero=(translation1 translation2 translation3)
          TransformAxis rotation1: coordinates=arm_flex_l axis=(0 0 1) LinearFunction(coefficients=1 0)
          TransformAxis rotation2: coordinates=arm_add_l axis=(-1 0 0) LinearFunction(coefficients=1 0)
          TransformAxis rotation3: coordinates=arm_rot_l axis=(0 -1 0) LinearFunction(coefficients=1 0)
    Body ulna_l: mass=0.6388607 mass_center=(0 -0.127592 0) inertia_xx=0.003490911 inertia_yy=0.0007283535
        inertia_zz=0.003786731 meshes=ulna_lv.vtp
      CustomJoint elbow_l: parent_body=humerus_l location_in_parent=(0.01215696 -0.2647755 0.00887447) location=(0 0 0)
        Coordinate elbow_flex_l: motion_type=rotational default_value=0 range=(0 3.1416) clamped=true
        SpatialTransform: axes_held_at_zero=(rotation2 rotation3 translation1 translation2 translation3)
          TransformAxis rotation1: coordinates=elbow_flex_l axis=(-0.226047 -0.022269 0.9738618)
              LinearFunction(coefficients=1 0)
    Body radius_l: mass=0.6388607 mass_center=(0 -0.127592 0) inertia_xx=0.003490911 inertia_yy=0.0007283535
        inertia_zz=0.003786731 meshes=radius_lv.vtp
      CustomJoint radioulnar_l: parent_body=ulna_l location_in_parent=(-0.007121449 -0.01376969 -0.02761242)
          location=(0 0 0)
        Coordinate pro_sup_l: motion_type=rotational default_value=0 range=(-3.1416 3.1416) clamped=false
        SpatialTransform: axes_held_at_zero=(rotation2 rotation3 translation1 translation2 translation3)
          TransformAxis rotation1: coordinates=pro_sup_l axis=(-0.05639803 -0.9984065 0.001952)
              LinearFunction(coefficients=1 0)
    Body lunate_l: mass=0.008863783 mass_center=(0 0 0) inertia_xx=8.863783e-6 inertia_yy=8.863783e-6
        inertia_zz=8.863783e-6 meshes=lunate_lvs.vtp
      CustomJoint radius_lunate_l: parent_body=radius_l location_in_parent=(-0.009312827 -0.2496699 -0.01440804)
          location=(0 0 0)
        Coordinate wrist_flex_l: motion_type=rotational default_value=0 range=(-1.5708 1.5708) clamped=true
        SpatialTransform: axes_held_at_zero=(rotation2 rotation3 translation1 translation2 translation3)
          TransformAxis rotation1: coordinates=wrist_flex_l axis=(0 0 1) LinearFunction(coefficients=1 0)
    Body hand_l: mass=0.6811348 mass_center=(0 -0.0809449 0) inertia_xx=0.001876529 inertia_yy=0.001150742
        inertia_zz=0.002819001
        meshes=(pisiform_lvs.vtp scaphoid_lvs.vtp triquetrum_lvs.vtp hamate_lvs.vtp capitate_lvs.vtp trapezoid_lvs.vtp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)
      CustomJoint lunate_hand_l: parent_body=lunate_l location_in_parent=(0 0 0) location=(0 0 0)
        Coordinate wrist_dev_l: motion_type=rotational default_value=0 range=(-0.4363323 0.6108652) clamped=true
        SpatialTransform: axes_held_at_zero=(rotation1 rotation3 translation1 translation2 translation3)
          TransformAxis rotation2: coordinates=wrist_dev_l axis=(-1 0 0) LinearFunction(coefficients=1 0)
    Body fingers_l: mass=0.1504382 mass_center=(0 -0.081226 0) inertia_xx=0.002140511 inertia_yy=0.002140511
        inertia_zz=0.002140511
        meshes=(index_proximal_lvs.vtp index_medial_lvs.vtp index_distal_lvs.vtp middle_proximal_lvs.vtp middle_medial_lvs.vtp middle_distal_lvs.vtp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)
      CustomJoint fingers_l: parent_body=hand_l location_in_parent=(0 -0.09153033 0.01188706) location=(0 0 0)
        Coordinate hand_finger_flex_l: motion_type=rotational default_value=0 range=(-1.5708 1.5708) clamped=true
        SpatialTransform: axes_held_at_zero=(rotation2 rotation3 translation1 translation2 translation3)
          TransformAxis rotation1: coordinates=hand_finger_flex_l axis=(0 0 1) LinearFunction(coefficients=1 0)
  ForceSet:
    Schutte1993Muscle_Deprecated ant_delt_r: max_isometric_force=1142.6 optimal_fiber_length=0.09825002
        tendon_slack_length=0.09361938 pennation_angle_at_optimal=0.3839724 [radians]
      PathPoint DELT1-P1: humerus_r (0.00887019 -0.117639 0.00579136)
      PathPoint DELT1-P2: humerus_r (0.0160673 -0.109224 0.0040787)
      PathPoint DELT1-P3: humerus_r (0.0494988 0.0197995 0)
      PathPoint DELT1-P4: torso (0.0207324 0.404282 0.0725634)
    Schutte1993Muscle_Deprecated ant_delt_l: max_isometric_force=1142.6 optimal_fiber_length=0.09414911
        tendon_slack_length=0.08971175 pennation_angle_at_optimal=0.3839724
      PathPoint DELT1-P1: humerus_l (0.00828716 -0.109907 -0.0054107)
      PathPoint DELT1-P2: humerus_l (0.0150112 -0.102045 0.00381061)
      PathPoint DELT1-P3: humerus_l (0.0462453 0.0184981 0)
      PathPoint DELT1-P4: torso (0.0207324 0.404282 -0.0725634)
    Schutte1993Muscle_Deprecated medial_delt_l: max_isometric_force=1142.6 optimal_fiber_length=0.09249465
        tendon_slack_length=0.08813527 pennation_angle_at_optimal=0.3839724
      PathPoint DELT1-P1: humerus_l (0.00828716 -0.109907 -0.0054107)
      PathPoint DELT1-P2: humerus_l (0.0147985 0.0231226 -0.0277472)
      PathPoint DELT1-P3: torso (0.0207324 0.425014 -0.139944)
    Schutte1993Muscle_Deprecated post_delt_r: max_isometric_force=259.88 optimal_fiber_length=0.1390564
        tendon_slack_length=0.03865503 pennation_angle_at_optimal=0.3141593
      PathPoint DELT1-P1: humerus_r (0.00887019 -0.117639 0.00579136)
      PathPoint DELT1-P2: humerus_r (-0.0160673 -0.109224 0.0040787)
      PathPoint DELT1-P3: torso (-0.0725634 0.310986 0.155493)
      PathPoint DELT1-P3: torso (-0.0725634 0.362817 0.103662)
    Schutte1993Muscle_Deprecated post_delt_l: max_isometric_force=259.88 optimal_fiber_length=0.1357914
        tendon_slack_length=0.03774744 pennation_angle_at_optimal=0.3141593
      PathPoint DELT1-P1: humerus_l (0.00828716 -0.109907 -0.0054107)
      PathPoint DELT1-P2: humerus_l (-0.0150112 -0.102045 -0.00381061)
      PathPoint DELT1-P3: torso (-0.0725634 0.310986 -0.155493)
      PathPoint DELT1-P3: torso (-0.0725634 0.362817 -0.103662)
    Schutte1993Muscle_Deprecated medial_delt_r: max_isometric_force=1142.6 optimal_fiber_length=0.09753734
        tendon_slack_length=0.0929403 pennation_angle_at_optimal=0.3839724
      PathPoint DELT1-P1: humerus_r (0.00887019 -0.117639 0.00579136)
      PathPoint DELT1-P2: humerus_r (0.0158396 0.0247494 0.0296993)
      PathPoint DELT1-P3: torso (0.0207324 0.425014 0.139944)
    Thelen2003Muscle glut_med1_r: max_isometric_force=819 optimal_fiber_length=0.05557728
        tendon_slack_length=0.08102856 pennation_angle_at_optimal=0.1396263 [radians] activation_time_constant=0.01
        deactivation_time_constant=0.04 FmaxTendonStrain=0.033 FmaxMuscleStrain=0.6 KshapeActive=0.5 KshapePassive=4
        Af=0.3 Flen=1.8
      PathPoint P1: pelvis (-0.0421861 0.0314328 0.125007)
      PathPoint P2: femur_r (-0.0229949 -0.0123413 0.058542)
    Thelen2003Muscle semiten_r: max_isometric_force=410 optimal_fiber_length=0.209097 tendon_slack_length=0.2657924
        pennation_angle_at_optimal=0.08726646 activation_time_constant=0.01 deactivation_time_constant=0.04
        FmaxTendonStrain=0.033 FmaxMuscleStrain=0.6 KshapeActive=0.5 KshapePassive=4 Af=0.3 Flen=1.8
      PathPoint P1: pelvis (-0.130642 -0.113613 0.0624416)
      ConditionalPathPoint P2: tibia_r (-0.0414471 -0.0281935 -0.0224542) range=(-0.331613 0.174533)
          coordinate=knee_angle_r
      PathPoint P3: tibia_r (-0.0327593 -0.0520874 -0.0225627)
      PathPoint P4: tibia_r (-0.0111433 -0.0735654 -0.0241602)
      PathPoint P5: tibia_r (0.00266255 -0.0942741 -0.0190323)
    Thelen2003Muscle bifemlh_r: max_isometric_force=896 optimal_fiber_length=0.114082 tendon_slack_length=0.3411993
        pennation_angle_at_optimal=0 activation_time_constant=0.01 deactivation_time_constant=0.04
        FmaxTendonStrain=0.033 FmaxMuscleStrain=0.6 KshapeActive=0.5 KshapePassive=4 Af=0.3 Flen=1.8
      PathPoint P1: pelvis (-0.130239 -0.106055 0.0717991)
      PathPoint P2: tibia_r (-0.0296825 -0.0355007 0.0290218)
      PathPoint P3: tibia_r (-0.0230755 -0.0555192 0.0338243)
    Thelen2003Muscle sar_r: max_isometric_force=156 optimal_fiber_length=0.5410062 tendon_slack_length=0.1040396
        pennation_angle_at_optimal=0 activation_time_constant=0.01 deactivation_time_constant=0.04
        FmaxTendonStrain=0.033 FmaxMuscleStrain=0.6 KshapeActive=0.5 KshapePassive=4 Af=0.3 Flen=1.8
      PathPoint P1: pelvis (-0.0158198 -0.00134416 0.128419)
      PathPoint P2: femur_r (-0.00316443 -0.376357 -0.0444075)
      PathPoint P3: tibia_r (-0.00552233 -0.0413189 -0.0393466)
      PathPoint P4: tibia_r (0.00591679 -0.0580831 -0.0377688)
      PathPoint P5: tibia_r (0.023963 -0.082835 -0.0248505)
    Thelen2003Muscle tfl_r: max_isometric_force=233 optimal_fiber_length=0.0993811 tendon_slack_length=0.4445997
        pennation_angle_at_optimal=0.05235988 activation_time_constant=0.01 deactivation_time_constant=0.04
        FmaxTendonStrain=0.033 FmaxMuscleStrain=0.6 KshapeActive=0.5 KshapePassive=4 Af=0.3 Flen=1.8
      PathPoint P1: pelvis (-0.0321565 0.022127 0.128316)
      PathPoint P2: femur_r (0.0310114 -0.104954 0.0629722)
      PathPoint P3: femur_r (0.00569598 -0.427093 0.0376568)
      PathPoint P4: tibia_r (0.00591679 -0.0480246 0.0292881)
    Thelen2003Muscle vas_med_r: max_isometric_force=1294 optimal_fiber_length=0.09416555 tendon_slack_length=0.133313
        pennation_angle_at_optimal=0.08726646 activation_time_constant=0.01 deactivation_time_constant=0.04
        FmaxTendonStrain=0.033 FmaxMuscleStrain=0.6 KshapeActive=0.5 KshapePassive=4 Af=0.3 Flen=1.8
      PathPoint P1: femur_r (0.0147674 -0.221405 0.0198304)
      PathPoint P2: femur_r (0.0375513 -0.292077 0.00094933)
      ConditionalPathPoint P3: femur_r (0.039028 -0.426988 -0.0131851) range=(-2.61799 -1.21004)
          coordinate=knee_angle_r
      ConditionalPathPoint P4: femur_r (0.0289018 -0.448822 -0.013818) range=(-2.61799 -1.78006)
          coordinate=knee_angle_r
      MovingPathPoint P5: tibia_r (0.0586847 0.0208499 -0.0143975) x_coordinate=knee_angle_r y_coordinate=knee_angle_r
          z_coordinate=knee_angle_r
        x_location: MultiplierFunction: scale=0.9861309
          SimmSpline: x=(-2.0944 -1.99997 -1.5708 -1.45752 -1.39626 -1.0472 -0.698132 -0.526391 -0.349066 -0.174533 0 0.00017453 0.00034907 0.0279253 0.0872665 0.174533 2.0944)
              y=(0.00981097 0.0122243 0.0217371 0.0238851 0.0249902 0.0307959 0.0364187 0.0392871 0.0425654 0.0475764 0.0559586 0.0559681 0.0559776 0.0575419 0.0613368 0.0679503 0.0629332)
        y_location: MultiplierFunction: scale=0.9861309
          SimmSpline: x=(-2.0944 -1.99997 -1.5708 -1.45752 -1.39626 -1.0472 -0.698132 -0.526391 -0.349066 -0.174533 0 0.00017453 0.00034907 0.0279253 0.0872665 0.174533 2.0944)
              y=(0.0224154 0.0227651 0.0241265 0.0242933 0.0243287 0.0239462 0.0233593 0.0230677 0.0228342 0.0226362 0.0217917 0.0217903 0.0217889 0.0215365 0.0206842 0.0183269 -0.0656205)
        z_location: MultiplierFunction: scale=0.9861309
          SimmSpline: x=(-2.0944 2.0944) y=(-0.0146 -0.0146)
    Thelen2003Muscle vas_lat_r: max_isometric_force=1871 optimal_fiber_length=0.08878738 tendon_slack_length=0.1659478
        pennation_angle_at_optimal=0.08726646 activation_time_constant=0.01 deactivation_time_constant=0.04
        FmaxTendonStrain=0.033 FmaxMuscleStrain=0.6 KshapeActive=0.5 KshapePassive=4 Af=0.3 Flen=1.8
      PathPoint P1: femur_r (0.00506309 -0.195562 0.0368129)
      PathPoint P2: femur_r (0.0283744 -0.273302 0.0431418)
      ConditionalPathPoint P3: femur_r (0.0380787 -0.425089 0.0216236) range=(-2.61799 -1.21004)
          coordinate=knee_angle_r
      ConditionalPathPoint P4: femur_r (0.0266867 -0.447556 0.0194085) range=(-2.61799 -1.92004)
          coordinate=knee_angle_r
      MovingPathPoint P5: tibia_r (0.0624375 0.0183645 0.0162712) x_coordinate=knee_angle_r y_coordinate=knee_angle_r
          z_coordinate=knee_angle_r
        x_location: MultiplierFunction: scale=0.9861309
          SimmSpline: x=(-2.0944 -1.99997 -1.5708 -1.45752 -1.39626 -1.0472 -0.698132 -0.526391 -0.349066 -0.174533 0 0.00017453 0.00034907 0.0279253 0.0872665 0.174533 2.0944)
              y=(0.0142897 0.016703 0.0262145 0.0283623 0.0294674 0.0352709 0.0408785 0.0437291 0.0469704 0.0518742 0.0599557 0.0599647 0.0599738 0.0614577 0.0650351 0.0711867 0.0583766)
        y_location: MultiplierFunction: scale=0.9861309
          SimmSpline: x=(-2.0944 -1.99997 -1.5708 -1.45752 -1.39626 -1.0472 -0.698132 -0.526391 -0.349066 -0.174533 0 0.00017453 0.00034907 0.0279253 0.0872665 0.174533 2.0944)
              y=(0.0215318 0.0218815 0.0232362 0.0234019 0.0234371 0.0230439 0.0223842 0.0220151 0.0216359 0.0210971 0.0195864 0.0195842 0.019582 0.01919 0.018008 0.0151073 -0.0653421)
        z_location: MultiplierFunction: scale=0.9861309
          SimmSpline: x=(-2.0944 2.0944) y=(0.0165 0.0165)
    Thelen2003Muscle med_gas_r: max_isometric_force=1558 optimal_fiber_length=0.05891956 tendon_slack_length=0.3829771
        pennation_angle_at_optimal=0.296706 activation_time_constant=0.01 deactivation_time_constant=0.04
        FmaxTendonStrain=0.033 FmaxMuscleStrain=0.6 KshapeActive=0.5 KshapePassive=4 Af=0.3 Flen=1.8
      PathPoint P1: femur_r (-0.0200414 -0.414435 -0.0247881)
      ConditionalPathPoint P2: femur_r (-0.0316443 -0.424245 -0.0272141) range=(-0.785398 0.174533)
          coordinate=knee_angle_r
      PathPoint P3: calcn_r (0 0.0322389 -0.0055118)
    Thelen2003Muscle lat_gas_r: max_isometric_force=683 optimal_fiber_length=0.06281656 tendon_slack_length=0.3729733
        pennation_angle_at_optimal=0.1396263 activation_time_constant=0.01 deactivation_time_constant=0.04
        FmaxTendonStrain=0.033 FmaxMuscleStrain=0.6 KshapeActive=0.5 KshapePassive=4 Af=0.3 Flen=1.8
      PathPoint P1: femur_r (-0.0232058 -0.416228 0.0286909)
      ConditionalPathPoint P2: femur_r (-0.0316443 -0.423823 0.0289018) range=(-0.785398 0.174533)
          coordinate=knee_angle_r
      PathPoint P3: calcn_r (0 0.0322389 -0.0055118)
    Thelen2003Muscle soleus_r: max_isometric_force=3549 optimal_fiber_length=0.04895634 tendon_slack_length=0.2447817
        pennation_angle_at_optimal=0.4363323 activation_time_constant=0.01 deactivation_time_constant=0.04
        FmaxTendonStrain=0.033 FmaxMuscleStrain=0.6 KshapeActive=0.5 KshapePassive=4 Af=0.3 Flen=1.8
      PathPoint P1: tibia_r (-0.00236671 -0.151174 0.00700153)
      PathPoint P2: calcn_r (0 0.0322389 -0.0055118)
    Thelen2003Muscle tib_post_r: max_isometric_force=1588 optimal_fiber_length=0.03063146 tendon_slack_length=0.3063146
        pennation_angle_at_optimal=0.2094395 activation_time_constant=0.01 deactivation_time_constant=0.04
        FmaxTendonStrain=0.033 FmaxMuscleStrain=0.6 KshapeActive=0.5 KshapePassive=4 Af=0.3 Flen=1.8
      PathPoint P1: tibia_r (-0.00926963 -0.13293 0.00187365)
      PathPoint P2: tibia_r (-0.0142003 -0.399482 -0.0225824)
      PathPoint P3: calcn_r (0.0433665 0.0347348 -0.0297429)
      PathPoint P4: calcn_r (0.0802852 0.0165354 -0.029223)
    Thelen2003Muscle tib_ant_r: max_isometric_force=905 optimal_fiber_length=0.09751281 tendon_slack_length=0.2218914
        pennation_angle_at_optimal=0.08726646 activation_time_constant=0.01 deactivation_time_constant=0.04
        FmaxTendonStrain=0.033 FmaxMuscleStrain=0.6 KshapeActive=0.5 KshapePassive=4 Af=0.3 Flen=1.8
      PathPoint P1: tibia_r (0.0176517 -0.160148 0.0113405)
      PathPoint P2: tibia_r (0.0324437 -0.38962 -0.0174545)
      PathPoint P3: calcn_r (0.12126 0.0185113 -0.0317189)
    Thelen2003Muscle per_long_r: max_isometric_force=943 optimal_fiber_length=0.04904234 tendon_slack_length=0.3452981
        pennation_angle_at_optimal=0.1745329 activation_time_constant=0.01 deactivation_time_constant=0.04
        FmaxTendonStrain=0.033 FmaxMuscleStrain=0.6 KshapeActive=0.5 KshapePassive=4 Af=0.3 Flen=1.8
      PathPoint P1: tibia_r (0.000493065 -0.154625 0.0356979)
      PathPoint P2: tibia_r (-0.0204129 -0.414668 0.0282033)
      PathPoint P3: tibia_r (-0.0159753 -0.42591 0.0284992)
      PathPoint P4: calcn_r (0.0455504 0.0239192 0.0229832)
      PathPoint P5: calcn_r (0.0708215 0.0110236 0.029535)
      PathPoint P6: calcn_r (0.0886049 0.00717575 0.0122716)
      PathPoint P7: calcn_r (0.125108 0.00883969 -0.0191353)
    Thelen2003Muscle glut_med1_l: max_isometric_force=819 optimal_fiber_length=0.05542919
        tendon_slack_length=0.08081265 pennation_angle_at_optimal=0.1396263 activation_time_constant=0.01
        deactivation_time_constant=0.04 FmaxTendonStrain=0.033 FmaxMuscleStrain=0.6 KshapeActive=0.5 KshapePassive=4
        Af=0.3 Flen=1.8
      PathPoint P1: pelvis (-0.0421861 0.0314328 -0.125007)
      PathPoint P2: femur_l (-0.0227368 -0.0122028 -0.0578851)
    Thelen2003Muscle semiten_l: max_isometric_force=410 optimal_fiber_length=0.2067815 tendon_slack_length=0.2628491
        pennation_angle_at_optimal=0.08726646 activation_time_constant=0.01 deactivation_time_constant=0.04
        FmaxTendonStrain=0.033 FmaxMuscleStrain=0.6 KshapeActive=0.5 KshapePassive=4 Af=0.3 Flen=1.8
      PathPoint P1: pelvis (-0.130642 -0.113613 -0.0624416)
      ConditionalPathPoint P2: tibia_l (-0.0411938 -0.0280212 0.022317) range=(-0.331613 0.174533)
          coordinate=knee_angle_l
      PathPoint P3: tibia_l (-0.0325591 -0.0517691 0.0224248)
      PathPoint P4: tibia_l (-0.0110752 -0.0731158 0.0240126)
      PathPoint P5: tibia_l (0.00264628 -0.093698 0.018916)
    Thelen2003Muscle bifemlh_l: max_isometric_force=896 optimal_fiber_length=0.1127851 tendon_slack_length=0.3373205
        pennation_angle_at_optimal=0 activation_time_constant=0.01 deactivation_time_constant=0.04
        FmaxTendonStrain=0.033 FmaxMuscleStrain=0.6 KshapeActive=0.5 KshapePassive=4 Af=0.3 Flen=1.8
      PathPoint P1: pelvis (-0.130239 -0.106055 -0.0717991)
      PathPoint P2: tibia_l (-0.0295011 -0.0352838 -0.0288445)
      PathPoint P3: tibia_l (-0.0229344 -0.0551799 -0.0336176)
    Thelen2003Muscle sar_l: max_isometric_force=156 optimal_fiber_length=0.5362085 tendon_slack_length=0.103117
        pennation_angle_at_optimal=0 activation_time_constant=0.01 deactivation_time_constant=0.04
        FmaxTendonStrain=0.033 FmaxMuscleStrain=0.6 KshapeActive=0.5 KshapePassive=4 Af=0.3 Flen=1.8
      PathPoint P1: pelvis (-0.0158198 -0.00134416 -0.128419)
      PathPoint P2: femur_l (-0.00312892 -0.372133 0.0439092)
      PathPoint P3: tibia_l (-0.00548858 -0.0410664 0.0391062)
      PathPoint P4: tibia_l (0.00588063 -0.0577281 0.037538)
      PathPoint P5: tibia_l (0.0238165 -0.0823288 0.0246986)
    Thelen2003Muscle tfl_l: max_isometric_force=233 optimal_fiber_length=0.098478 tendon_slack_length=0.4405595
        pennation_angle_at_optimal=0.05235988 activation_time_constant=0.01 deactivation_time_constant=0.04
        FmaxTendonStrain=0.033 FmaxMuscleStrain=0.6 KshapeActive=0.5 KshapePassive=4 Af=0.3 Flen=1.8
      PathPoint P1: pelvis (-0.0321565 0.022127 -0.128316)
      PathPoint P2: femur_l (0.0306634 -0.103776 -0.0622655)
      PathPoint P3: femur_l (0.00563206 -0.4223 -0.0372342)
      PathPoint P4: tibia_l (0.00588063 -0.0477311 -0.0291091)
    Thelen2003Muscle vas_med_l: max_isometric_force=1294 optimal_fiber_length=0.09308455 tendon_slack_length=0.1317826
        pennation_angle_at_optimal=0.08726646 activation_time_constant=0.01 deactivation_time_constant=0.04
        FmaxTendonStrain=0.033 FmaxMuscleStrain=0.6 KshapeActive=0.5 KshapePassive=4 Af=0.3 Flen=1.8
      PathPoint P1: femur_l (0.0146016 -0.21892 -0.0196079)
      PathPoint P2: femur_l (0.0371299 -0.288799 -0.000938677)
      ConditionalPathPoint P3: femur_l (0.03859 -0.422196 0.0130372) range=(-2.61799 -1.21004) coordinate=knee_angle_l
      ConditionalPathPoint P4: femur_l (0.0285775 -0.443785 0.013663) range=(-2.61799 -1.78006) coordinate=knee_angle_l
      MovingPathPoint P5: tibia_l (0.058336 0.0207202 0.0143095) x_coordinate=knee_angle_l y_coordinate=knee_angle_l
          z_coordinate=knee_angle_l
        x_location: MultiplierFunction: scale=0.9801042
          SimmSpline: x=(-2.0944 -1.99997 -1.5708 -1.45752 -1.39626 -1.0472 -0.698132 -0.526391 -0.349066 -0.174533 0 0.00017453 0.00034907 0.0279253 0.0872665 0.174533 2.0944)
              y=(0.00981097 0.0122243 0.0217371 0.0238851 0.0249902 0.0307959 0.0364187 0.0392871 0.0425654 0.0475764 0.0559586 0.0559681 0.0559776 0.0575419 0.0613368 0.0679503 0.0629332)
        y_location: MultiplierFunction: scale=0.9801042
          SimmSpline: x=(-2.0944 -1.99997 -1.5708 -1.45752 -1.39626 -1.0472 -0.698132 -0.526391 -0.349066 -0.174533 0 0.00017453 0.00034907 0.0279253 0.0872665 0.174533 2.0944)
              y=(0.0224154 0.0227651 0.0241265 0.0242933 0.0243287 0.0239462 0.0233593 0.0230677 0.0228342 0.0226362 0.0217917 0.0217903 0.0217889 0.0215365 0.0206842 0.0183269 -0.0656205)
        z_location: MultiplierFunction: scale=0.9801042
          SimmSpline: x=(-2.0944 2.0944) y=(0.0146 0.0146)
    Thelen2003Muscle vas_lat_l: max_isometric_force=1871 optimal_fiber_length=0.08777525 tendon_slack_length=0.1640561
        pennation_angle_at_optimal=0.08726646 activation_time_constant=0.01 deactivation_time_constant=0.04
        FmaxTendonStrain=0.033 FmaxMuscleStrain=0.6 KshapeActive=0.5 KshapePassive=4 Af=0.3 Flen=1.8
      PathPoint P1: femur_l (0.00500627 -0.193367 -0.0363998)
      PathPoint P2: femur_l (0.028056 -0.270235 -0.0426576)
      ConditionalPathPoint P3: femur_l (0.0376514 -0.420318 -0.021381) range=(-2.61799 -1.21004)
          coordinate=knee_angle_l
      ConditionalPathPoint P4: femur_l (0.0263872 -0.442534 -0.0191907) range=(-2.61799 -1.92004)
          coordinate=knee_angle_l
      MovingPathPoint P5: tibia_l (0.0620653 0.0182492 -0.0161717) x_coordinate=knee_angle_l y_coordinate=knee_angle_l
          z_coordinate=knee_angle_l
        x_location: MultiplierFunction: scale=0.9801042
          SimmSpline: x=(-2.0944 -1.99997 -1.5708 -1.45752 -1.39626 -1.0472 -0.698132 -0.526391 -0.349066 -0.174533 0 0.00017453 0.00034907 0.0279253 0.0872665 0.174533 2.0944)
              y=(0.0142897 0.016703 0.0262145 0.0283623 0.0294674 0.0352709 0.0408785 0.0437291 0.0469704 0.0518742 0.0599557 0.0599647 0.0599738 0.0614577 0.0650351 0.0711867 0.0583766)
        y_location: MultiplierFunction: scale=0.9801042
          SimmSpline: x=(-2.0944 -1.99997 -1.5708 -1.45752 -1.39626 -1.0472 -0.698132 -0.526391 -0.349066 -0.174533 0 0.00017453 0.00034907 0.0279253 0.0872665 0.174533 2.0944)
              y=(0.0215318 0.0218815 0.0232362 0.0234019 0.0234371 0.0230439 0.0223842 0.0220151 0.0216359 0.0210971 0.0195864 0.0195842 0.019582 0.01919 0.018008 0.0151073 -0.0653421)
        z_location: MultiplierFunction: scale=0.9801042
          SimmSpline: x=(-2.0944 2.0944) y=(-0.0165 -0.0165)
    Thelen2003Muscle med_gas_l: max_isometric_force=1558 optimal_fiber_length=0.05874266 tendon_slack_length=0.3818273
        pennation_angle_at_optimal=0.296706 activation_time_constant=0.01 deactivation_time_constant=0.04
        FmaxTendonStrain=0.033 FmaxMuscleStrain=0.6 KshapeActive=0.5 KshapePassive=4 Af=0.3 Flen=1.8
      PathPoint P1: femur_l (-0.0198165 -0.409784 0.0245099)
      ConditionalPathPoint P2: femur_l (-0.0312892 -0.419484 0.0269087) range=(-0.785398 0.174533)
          coordinate=knee_angle_l
      PathPoint P3: calcn_l (0 0.0321724 0.00550044)
    Thelen2003Muscle lat_gas_l: max_isometric_force=683 optimal_fiber_length=0.06262776 tendon_slack_length=0.3718523
        pennation_angle_at_optimal=0.1396263 activation_time_constant=0.01 deactivation_time_constant=0.04
        FmaxTendonStrain=0.033 FmaxMuscleStrain=0.6 KshapeActive=0.5 KshapePassive=4 Af=0.3 Flen=1.8
      PathPoint P1: femur_l (-0.0229454 -0.411558 -0.0283689)
      ConditionalPathPoint P2: femur_l (-0.0312892 -0.419067 -0.0285775) range=(-0.785398 0.174533)
          coordinate=knee_angle_l
      PathPoint P3: calcn_l (0 0.0321724 0.00550044)
    Thelen2003Muscle soleus_l: max_isometric_force=3549 optimal_fiber_length=0.04892147 tendon_slack_length=0.2446074
        pennation_angle_at_optimal=0.4363323 activation_time_constant=0.01 deactivation_time_constant=0.04
        FmaxTendonStrain=0.033 FmaxMuscleStrain=0.6 KshapeActive=0.5 KshapePassive=4 Af=0.3 Flen=1.8
      PathPoint P1: tibia_l (-0.00235225 -0.15025 -0.00695874)
      PathPoint P2: calcn_l (0 0.0321724 0.00550044)
    Thelen2003Muscle tib_post_l: max_isometric_force=1588 optimal_fiber_length=0.03053318 tendon_slack_length=0.3053318
        pennation_angle_at_optimal=0.2094395 activation_time_constant=0.01 deactivation_time_constant=0.04
        FmaxTendonStrain=0.033 FmaxMuscleStrain=0.6 KshapeActive=0.5 KshapePassive=4 Af=0.3 Flen=1.8
      PathPoint P1: tibia_l (-0.00921298 -0.132118 -0.0018622)
      PathPoint P2: tibia_l (-0.0141135 -0.39704 0.0224444)
      PathPoint P3: calcn_l (0.0432771 0.0346632 0.0296816)
      PathPoint P4: calcn_l (0.0801196 0.0165013 0.0291627)
    Thelen2003Muscle tib_ant_l: max_isometric_force=905 optimal_fiber_length=0.09705196 tendon_slack_length=0.2208427
        pennation_angle_at_optimal=0.08726646 activation_time_constant=0.01 deactivation_time_constant=0.04
        FmaxTendonStrain=0.033 FmaxMuscleStrain=0.6 KshapeActive=0.5 KshapePassive=4 Af=0.3 Flen=1.8
      PathPoint P1: tibia_l (0.0175439 -0.159169 -0.0112712)
      PathPoint P2: tibia_l (0.0322454 -0.387239 0.0173478)
      PathPoint P3: calcn_l (0.12101 0.0184732 0.0316535)
    Thelen2003Muscle per_long_l: max_isometric_force=943 optimal_fiber_length=0.04881021 tendon_slack_length=0.3436637
        pennation_angle_at_optimal=0.1745329 activation_time_constant=0.01 deactivation_time_constant=0.04
        FmaxTendonStrain=0.033 FmaxMuscleStrain=0.6 KshapeActive=0.5 KshapePassive=4 Af=0.3 Flen=1.8
      PathPoint P1: tibia_l (0.000490052 -0.15368 -0.0354798)
      PathPoint P2: tibia_l (-0.0202882 -0.412134 -0.028031)
      PathPoint P3: tibia_l (-0.0158777 -0.423307 -0.028325)
      PathPoint P4: calcn_l (0.0454565 0.0238698 -0.0229358)
      PathPoint P5: calcn_l (0.0706755 0.0110009 -0.0294741)
      PathPoint P6: calcn_l (0.0884222 0.00716095 -0.0122463)
      PathPoint P7: calcn_l (0.12485 0.00882146 0.0190959)
    Thelen2003Muscle ercspn_r: max_isometric_force=2500 optimal_fiber_length=0.1243125 tendon_slack_length=0.03107814
        pennation_angle_at_optimal=0 activation_time_constant=0.01 deactivation_time_constant=0.04
        FmaxTendonStrain=0.033 FmaxMuscleStrain=0.6 KshapeActive=0.5 KshapePassive=4 Af=0.3 Flen=1.8
      PathPoint P1: pelvis (-0.144756 0.0453914 0.0450812)
      PathPoint P2: torso (-0.0570141 0.114028 0.0249826)
    Thelen2003Muscle ercspn_l: max_isometric_force=2500 optimal_fiber_length=0.1243125 tendon_slack_length=0.03107814
        pennation_angle_at_optimal=0 activation_time_constant=0.01 deactivation_time_constant=0.04
        FmaxTendonStrain=0.033 FmaxMuscleStrain=0.6 KshapeActive=0.5 KshapePassive=4 Af=0.3 Flen=1.8
      PathPoint P1: pelvis (-0.144756 0.0453914 -0.0450812)
      PathPoint P2: torso (-0.0570141 0.114028 -0.0249826)
    Thelen2003Muscle rect_abd_r: max_isometric_force=263 optimal_fiber_length=0.2317567 tendon_slack_length=0.0176044
      PathPoint P1: pelvis (-0.042995 -0.0827178 0.0110532)
      PathPoint P2: torso (0.0912848 0.230721 0.0357116)
    Thelen2003Muscle rect_abd_l: max_isometric_force=263 optimal_fiber_length=0.2317567 tendon_slack_length=0.0176044
      PathPoint P1: pelvis (-0.042995 -0.0827178 -0.0110532)
      PathPoint P2: torso (0.0912848 0.230721 -0.0357116)
    Schutte1993Muscle_Deprecated r_stern_mast: max_isometric_force=68.95 optimal_fiber_length=0.1062012
        tendon_slack_length=0.05518824 pennation_angle_at_optimal=0.2617994
      PathPoint stern_mast-P1: torso (0.0310986 0.400136 0.00995156)
      PathPoint stern_mast-P2: head_and_neck (0 0.0808021 0.0611244)
    Schutte1993Muscle_Deprecated l_stern_mast: max_isometric_force=68.95 optimal_fiber_length=0.1062012
        tendon_slack_length=0.05518824 pennation_angle_at_optimal=0.2617994
      PathPoint stern_mast-P1: torso (0.0310986 0.400136 -0.00995156)
      PathPoint stern_mast-P2: head_and_neck (0 0.0808021 -0.0611244)
    Schutte1993Muscle_Deprecated r_trap_acr: max_isometric_force=376.95 optimal_fiber_length=0.0953691
        tendon_slack_length=0.07938648 pennation_angle_at_optimal=0
      PathPoint trap_acr-P1: torso (-0.0673803 0.435381 0)
      PathPoint trap_acr-P2: torso (0 0.425014 -0.103662)
    Schutte1993Muscle_Deprecated l_trap_acr: max_isometric_force=376.95 optimal_fiber_length=0.0953691
        tendon_slack_length=0.07938648 pennation_angle_at_optimal=0
      PathPoint trap_acr-P1: torso (-0.0673803 0.435381 0)
      PathPoint trap_acr-P2: torso (0 0.425014 0.103662)
    Schutte1993Muscle_Deprecated TRIlong: max_isometric_force=798.52 optimal_fiber_length=0.1319865
        tendon_slack_length=0.1408513 pennation_angle_at_optimal=0.2094395
      PathPoint P1: torso (-0.0207324 0.393916 0.155493)
      PathPoint P2: humerus_r (-0.026868 -0.113263 -0.00657344)
      PathPoint P3: humerus_r (-0.0315208 -0.224101 -0.012048)
      PathPoint P4: humerus_r (-0.0172553 -0.264888 -0.0119589)
      PathPoint P5: ulna_r (-0.0235397 0.0112432 -0.000838401)
    Schutte1993Muscle_Deprecated TRIlong_l: max_isometric_force=798.52 optimal_fiber_length=0.1230868
        tendon_slack_length=0.1313538 pennation_angle_at_optimal=0.2094395
      PathPoint TRIlong-P1: torso (-0.0207324 0.393916 -0.155493)
      PathPoint TRIlong-P2: humerus_l (-0.0251019 -0.105818 0.00614137)
      PathPoint TRIlong-P3: humerus_l (-0.029449 -0.209371 0.0112561)
      PathPoint TRIlong-P4: humerus_l (-0.0161211 -0.247477 0.0111729)
      PathPoint TRIlong-P5: ulna_l (-0.0231841 0.0110733 0.000825737)
    Schutte1993Muscle_Deprecated TRIlat: max_isometric_force=624.3 optimal_fiber_length=0.1113398
        tendon_slack_length=0.09588141 pennation_angle_at_optimal=0.1570796
      PathPoint P1: humerus_r (-0.00592996 -0.125192 0.0042371)
      PathPoint P2: humerus_r (-0.023205 -0.143824 0.00918698)
      PathPoint P3: humerus_r (-0.0315208 -0.224101 -0.012048)
      PathPoint P4: humerus_r (-0.0172553 -0.264888 -0.0119589)
      PathPoint P5: ulna_r (-0.0235397 0.0112432 -0.000838401)
    Schutte1993Muscle_Deprecated TRIlat_l: max_isometric_force=624.3 optimal_fiber_length=0.1031986
        tendon_slack_length=0.08887052 pennation_angle_at_optimal=0.1570796
      PathPoint P1: humerus_l (-0.00554019 -0.116964 -0.0039586)
      PathPoint P2: humerus_l (-0.0216798 -0.13437 -0.00858313)
      PathPoint P3: humerus_l (-0.029449 -0.209371 0.0112561)
      PathPoint P4: humerus_l (-0.0161211 -0.247477 0.0111729)
      PathPoint P5: ulna_l (-0.0231841 0.0110733 0.000825737)
    Schutte1993Muscle_Deprecated BIClong: max_isometric_force=624.3 optimal_fiber_length=0.1162547
        tendon_slack_length=0.2736055 pennation_angle_at_optimal=0
      PathPoint P1: torso (0.0310986 0.38355 0.155493)
      PathPoint P2: torso (0.0310986 0.399099 0.165859)
      PathPoint P3: humerus_r (0.0210964 0.0178196 0.00989976)
      PathPoint P4: humerus_r (0.0235416 -0.00505878 0.0118896)
      PathPoint P5: humerus_r (0.0158396 -0.0277193 0.00134637)
      PathPoint P6: humerus_r (0.0128697 -0.0762282 -0.00163346)
      PathPoint P7: humerus_r (0.0168593 -0.120035 0.000237594)
      PathPoint P8: humerus_r (0.0225715 -0.173642 -0.00623685)
      PathPoint BIClong_l-P9: humerus_r (0.0346492 -0.277193 -0.00593986)
      PathPoint P10: radius_r (-0.00214975 -0.0403077 -0.00214975)
    Schutte1993Muscle_Deprecated BIClong_l: max_isometric_force=624.3 optimal_fiber_length=0.1101067
        tendon_slack_length=0.2591363 pennation_angle_at_optimal=0
      PathPoint P1: torso (0.0310986 0.38355 -0.155493)
      PathPoint P2: torso (0.0310986 0.399099 -0.165859)
      PathPoint P3: humerus_l (0.0197097 0.0166483 -0.00924906)
      PathPoint P4: humerus_l (0.0219943 -0.00472627 -0.0111081)
      PathPoint P5: humerus_l (0.0147985 -0.0258974 -0.00125787)
      PathPoint P6: humerus_l (0.0120238 -0.0712177 0.00152609)
      PathPoint P7: humerus_l (0.0157511 -0.112145 -0.000221977)
      PathPoint P8: humerus_l (0.0210879 -0.162228 0.00582691)
      PathPoint P9: humerus_l (0.0323717 -0.258974 0.00554943)
      PathPoint P10: radius_l (-0.00211727 -0.0396989 0.00211727)
    Schutte1993Muscle_Deprecated BRD: max_isometric_force=261.33 optimal_fiber_length=0.1824143
        tendon_slack_length=0.1405626 pennation_angle_at_optimal=0
      PathPoint P1: humerus_r (0.00989976 -0.197995 0.00220765)
      PathPoint P2: radius_r (0 0.0214975 0.0247221)
      PathPoint P3: radius_r (0 -0.247221 0.0429949)
    Schutte1993Muscle_Deprecated BRD_l: max_isometric_force=261.33 optimal_fiber_length=0.1778739
        tendon_slack_length=0.1370639 pennation_angle_at_optimal=0
      PathPoint P1: humerus_l (0.00924906 -0.184981 -0.00206254)
      PathPoint P2: radius_l (0 0.0211727 -0.0243486)
      PathPoint P3: radius_l (0 -0.243486 -0.0423455)
    Schutte1993Muscle_Deprecated FCR: max_isometric_force=73.96 optimal_fiber_length=0.06826922
        tendon_slack_length=0.2652498 pennation_angle_at_optimal=0.05410521
      PathPoint P1: humerus_r (0.00750402 -0.275273 -0.0366786)
      PathPoint P2: radius_r (0.00429949 -0.257969 0.0214975)
      PathPoint P3: hand_r (0.00381326 -0.0254217 0.0254217)
    Schutte1993Muscle_Deprecated FCR_l: max_isometric_force=73.96 optimal_fiber_length=0.06673455
        tendon_slack_length=0.2592871 pennation_angle_at_optimal=0.05410521
      PathPoint P1: humerus_l (0.00701079 -0.257179 0.0342678)
      PathPoint P2: radius_l (0.00423455 -0.254073 -0.0211727)
      PathPoint P3: hand_l (0.00356612 -0.0237741 -0.0237741)
    Schutte1993Muscle_Deprecated ECRL: max_isometric_force=304.89 optimal_fiber_length=0.08755622
        tendon_slack_length=0.2421308 pennation_angle_at_optimal=0
      PathPoint P1: humerus_r (-0.00722683 -0.258285 0.0197995)
      PathPoint P2: radius_r (-0.0322462 -0.14471 0.0300964)
      PathPoint P3: radius_r (-0.0214975 -0.254745 0.0386954)
      PathPoint P4: hand_r (-0.00381326 -0.0254217 0.0254217)
    Schutte1993Muscle_Deprecated ECRL_l: max_isometric_force=304.89 optimal_fiber_length=0.08565788
        tendon_slack_length=0.236881 pennation_angle_at_optimal=0
      PathPoint P1: humerus_l (-0.00675181 -0.241308 -0.0184981)
      PathPoint P2: radius_l (-0.0317591 -0.142524 -0.0296418)
      PathPoint P3: radius_l (-0.0211727 -0.250897 -0.0381109)
      PathPoint P4: hand_l (-0.00356612 -0.0237741 -0.0237741)
    Schutte1993Muscle_Deprecated PT: max_isometric_force=566.22 optimal_fiber_length=0.104555
        tendon_slack_length=0.2389828 pennation_angle_at_optimal=0.1745329
      PathPoint P1: humerus_r (0.00356391 -0.273134 -0.0361341)
      PathPoint P2: ulna_r (0 -0.0376205 -0.0150482)
      PathPoint P3: radius_r (0.0107487 -0.0967385 0.0268718)
      PathPoint P4: radius_r (-0.0268718 -0.139733 0.0322462)
    Schutte1993Muscle_Deprecated PT_l: max_isometric_force=566.22 optimal_fiber_length=0.1025559
        tendon_slack_length=0.2344136 pennation_angle_at_optimal=0.1745329
      PathPoint P1: humerus_l (0.00332966 -0.255181 0.0332966)
      PathPoint P2: ulna_l (0 -0.0370523 0.0148209)
      PathPoint P3: radius_l (0.0105864 -0.0952773 -0.0264659)
      PathPoint P4: radius_l (-0.0264659 -0.137623 -0.0317591)
    Schutte1993Muscle_Deprecated LAT2: max_isometric_force=389.1 optimal_fiber_length=0.2416814
        tendon_slack_length=0.1835489 pennation_angle_at_optimal=0.3316126
      PathPoint P1: humerus_r (-0.00494988 -0.0403019 -0.00593986)
      PathPoint P2: torso (-0.124394 0.290254 0.134761)
      PathPoint P3: torso (-0.114028 0.248789 0.051831)
      PathPoint P4: torso (-0.0744916 0.186592 0.00829296)
    Schutte1993Muscle_Deprecated LAT2_l: max_isometric_force=389.1 optimal_fiber_length=0.2427811
        tendon_slack_length=0.1843841 pennation_angle_at_optimal=0.3316126
      PathPoint P1: humerus_l (-0.00462453 -0.0376529 0.00554943)
      PathPoint P2: torso (-0.124394 0.290254 -0.134761)
      PathPoint P3: torso (-0.114028 0.248789 -0.051831)
      PathPoint P4: torso (-0.0744916 0.186592 -0.00829296)
    Schutte1993Muscle_Deprecated PECM2: max_isometric_force=515.41 optimal_fiber_length=0.1441692
        tendon_slack_length=0.09264299 pennation_angle_at_optimal=0.4363323
      PathPoint P1: humerus_r (0.0126123 -0.042569 -0.00791981)
      PathPoint P2: torso (0.0881128 0.331719 0.103662)
      PathPoint P3: torso (0.0881128 0.331719 0.051831)
      PathPoint P4: torso (0.028704 0.331719 0.0238423)
    Schutte1993Muscle_Deprecated PECM2_l: max_isometric_force=515.41 optimal_fiber_length=0.1450445
        tendon_slack_length=0.09320546 pennation_angle_at_optimal=0.4363323
      PathPoint PECM2-P1_l: humerus_l (0.0117833 -0.0397709 0.00739925)
      PathPoint PECM2-P2_l: torso (0.0881128 0.331719 -0.103662)
      PathPoint PECM2-P3_l: torso (0.0881128 0.331719 -0.051831)
      PathPoint PECM2-P4_l: torso (0.028704 0.331719 -0.0238423)
    ObjectGroup R_hip_abd: members=(glut_med1_r sar_r tfl_r)
    ObjectGroup R_hip_flex: members=(glut_med1_r sar_r tfl_r)
    ObjectGroup R_hip_inrot: members=(glut_med1_r tfl_r)
    ObjectGroup R_hip_exrot
    ObjectGroup R_hip_ext: members=(bifemlh_r semiten_r)
    ObjectGroup R_hip_add: members=(bifemlh_r semiten_r)
    ObjectGroup R_knee_bend: members=(bifemlh_r lat_gas_r med_gas_r sar_r semiten_r)
    ObjectGroup R_knee_ext: members=(vas_lat_r vas_med_r)
    ObjectGroup R_ankle_pf: members=(lat_gas_r med_gas_r soleus_r tib_post_r)
    ObjectGroup R_inverter: members=(tib_ant_r tib_post_r)
    ObjectGroup R_ankle_df: members=tib_ant_r
    ObjectGroup R_everter
    ObjectGroup L_hip_abd: members=(glut_med1_l sar_l tfl_l)
    ObjectGroup L_hip_flex: members=(glut_med1_l sar_l tfl_l)
    ObjectGroup L_hip_inrot: members=(glut_med1_l tfl_l)
    ObjectGroup L_hip_exrot
    ObjectGroup L_hip_ext: members=(bifemlh_l semiten_l)
    ObjectGroup L_hip_add: members=(bifemlh_l semiten_l)
    ObjectGroup L_knee_bend: members=(bifemlh_l lat_gas_l med_gas_l sar_l semiten_l)
    ObjectGroup L_knee_ext: members=(vas_lat_l vas_med_l)
    ObjectGroup L_ankle_pf: members=(lat_gas_l med_gas_l soleus_l tib_post_l)
    ObjectGroup L_inverter: members=(tib_ant_l tib_post_l)
    ObjectGroup L_ankle_df: members=tib_ant_l
    ObjectGroup L_everter
    ObjectGroup back_ext: members=(ercspn_l ercspn_r)
    ObjectGroup back_rlb: members=ercspn_r
    ObjectGroup back_introt: members=ercspn_r
    ObjectGroup back_llb: members=ercspn_l
    ObjectGroup back_extrot: members=ercspn_l
    ObjectGroup back_flex: members=(rect_abd_r rect_abd_l)
    ObjectGroup neck flexion: members=(r_stern_mast l_stern_mast r_trap_acr l_trap_acr)
    ObjectGroup R_shoulder: members=(ant_delt_r post_delt_r medial_delt_r PECM2 LAT2)
    ObjectGroup L_shoulder: members=(ant_delt_l post_delt_l medial_delt_l PECM2_l LAT2_l)
    ObjectGroup R_elbow: members=(TRIlong TRIlat BIClong BRD)
    ObjectGroup L_elbow: members=(TRIlong_l TRIlat_l BIClong_l BRD_l)
    ObjectGroup R_wrist: members=(FCR ECRL PT)
    ObjectGroup L_wrist: members=(FCR_l ECRL_l PT_l)
  MarkerSet:
    Marker STR: torso (0.13102 0.237359 0.0089075)
    Marker RA: torso (-0.05253 0.450606 0.127794)
    Marker LA: torso (-0.0452326 0.450777 -0.126464)
    Marker C7: torso (-0.0816639 0.425316 0.000984185)
    Marker T10: torso (-0.107828 0.160297 -0.00980732)
    Marker SUP: torso (0.0722673 0.391943 0.0097569)
    Marker RLHE: humerus_r (0.0469732 -0.269301 0.0322303)
    Marker RMHE: humerus_r (0.0385176 -0.258994 -0.0540115)
    Marker RUS: radius_r (-0.0407957 -0.210408 -0.027692)
    Marker RRS: radius_r (-0.00517484 -0.233187 0.0490902)
    Marker RHMH5: hand_r (0.0149771 -0.0641536 -0.0684923)
    Marker RHMH2: hand_r (0.0291794 -0.0751921 0.0382801)
    Marker LLHE: humerus_l (0.0160302 -0.243322 -0.0433831)
    Marker LMHE: humerus_l (0.00251976 -0.249916 0.0374645)
    Marker LUS: radius_l (-0.0360693 -0.206712 0.036956)
    Marker LRS: radius_l (-0.00632804 -0.219808 -0.0455739)
    Marker LHMH2: hand_l (0.0203598 -0.0589841 -0.0361908)
    Marker LHMH5: hand_l (0.0164124 -0.0602526 0.0660694)
    Marker RASIS: pelvis (-0.0306848 0.0340526 0.119388)
    Marker LASIS: pelvis (-0.0166967 0.0380557 -0.123036)
    Marker LPSIS: pelvis (-0.190866 0.0487049 -0.0790297)
    Marker RPSIS: pelvis (-0.193391 0.0493766 0.0555652)
    Marker RLFE: femur_r (-0.00374642 -0.405086 0.0529837)
    Marker RMFE: femur_r (0.0342218 -0.430056 -0.0660582)
    Marker RATT: tibia_r (0.0550239 -0.051729 0.0142566)
    Marker RLM: tibia_r (-0.00582403 -0.401656 0.0540519)
    Marker RSPH: tibia_r (0.0372441 -0.378364 -0.0349343)
    Marker RCAL: calcn_r (0.00540162 0.0490674 -0.0228489)
    Marker RMFH1: calcn_r (0.194018 0.0170259 -0.0502844)
    Marker RMFH5: calcn_r (0.170616 -0.00163593 0.0689139)
    Marker RGT: femur_r (-0.0147989 -0.0525548 0.0799215)
    Marker LGT: femur_l (-0.0195095 -0.0669637 -0.0969521)
    Marker LLFE: femur_l (-0.00257719 -0.401705 -0.066259)
    Marker LMFE: femur_l (0.0224376 -0.423918 0.0600302)
    Marker LATT: tibia_l (0.0462714 -0.0756696 -0.0146739)
    Marker LLM: tibia_l (-0.0209004 -0.411025 -0.0550884)
    Marker LSPH: tibia_l (0.0184562 -0.38794 0.0388649)
    Marker LCAL: calcn_l (-0.0134051 0.028408 0.0150375)
    Marker LMFH1: calcn_l (0.181259 0.0169023 0.0518937)
    Marker LMFH5: calcn_l (0.158844 0.0139864 -0.0658037)
    Marker SEL: head_and_neck (0.123894 0.172589 0.00460861)
    Marker OCC: head_and_neck (-0.0883554 0.100381 0.00676377)
    Marker RTEMP: head_and_neck (0.0194593 0.142227 0.0964683)
    Marker LTEMP: head_and_neck (0.0280383 0.129512 -0.0951233)
    Marker RTT2: toes_r (0.0600064 0.0131911 0.0165345)
    Marker LTT2: toes_l (0.050934 0.0111967 -0.00595421)
    Marker RFT3: fingers_r (0.0303891 -0.0743896 0.00242536)
    Marker LFT3: fingers_l (0.0316669 -0.0744652 -0.00398042)
